echo			both
dimension        3
boundary	   p p p
units          real
atom_style     full
timestep        1             # Timestep/fs
neighbor		         2.0        bin
neigh_modify		    delay 0     every 1     check yes

##########################################
############ GCMC setting #############
##########################################

variable        mu              equal     -8.267
variable        atm2MPa         equal      0.101325
variable        press           equal      10/${atm2MPa}
variable        temp            equal      363.15
variable        GCMCNevery      equal      2000
variable        GCMCexchange    equal      500
variable        GCMCmove        equal      0
variable	    disp            equal      0.8
variable        Tdamp           equal      100*dt
variable        Pdamp           equal      1000*dt

##########################################
############ General setting #############
##########################################

variable        seed            equal     649345
variable        rcut            equal     14           # Radius cutoff/A
variable        kspace          equal     0.0001
variable        dump            equal     100000
variable        thermo          equal     500

##########################################
##########################################

pair_style          lj/cut/coul/long     ${rcut}                #cutoff lj = cutoff coulomb
pair_modify         mix                 arithmetic             #Lorentz–Berthelot combining rules
pair_modify         tail                no
kspace_style        pppm                ${kspace}
bond_style          harmonic
angle_style         harmonic
dihedral_style      harmonic
improper_style      cvff

read_data              IIA-2.data      &
extra/atom/types  2                &
extra/bond/types   1               &
extra/angle/types 1               &
extra/bond/per/atom 2             &
extra/angle/per/atom 1      &
extra/special/per/atom 2


molecule        N2mol N2.txt   toff  18  boff 43 aoff 129


region regionGCMC  block  EDGE  EDGE  EDGE  EDGE    EDGE  EDGE

create_atoms   	0 random 5  ${seed} regionGCMC mol  N2mol  ${seed} units box overlap 2


pair_coeff    19    19     0.0000     0.0000       #COM COM
pair_coeff    20    20     0.0715     3.31000       #N-N
bond_coeff      44        0          0.550       #N-COM
angle_coeff     130       0          180       #N-COM-N

mass 19 1.0e-20   #COM
mass 20 14.00670   #N

group          kerogen                type     1:18
group          N2                     type     19  20

compute TempN2 N2 temp
compute_modify TempN2 dynamic/dof yes


dump               1    all     custom    ${dump}    kerogen.xyz   type id x y z element
dump_modify        1    element  C C C C H O C C N C H O O H S N C S COM  N1

#-------------------------------------------------------------------------------
# run_style verlet
# Nose/Hoover temperature thermostat and Nose/Hoover pressure barostat
#-------------------------------------------------------------------------------

run_style      verlet               # The verlet style is a standard velocity-Verlet integrator.


fix          rigidstructure      kerogen    setforce     0    0     0
velocity     kerogen   set    0   0    0
neigh_modify     exclude      group       kerogen   kerogen
delete_bonds kerogen multi any

velocity  N2 create ${temp} ${seed} dist gaussian


variable 	  COM atom "type==19"
variable        Nitrogen atom "type==20"
group 		COM dynamic N2 var COM
group 	        Nitrogen dynamic N2 var Nitrogen
variable        nC equal count(COM)
variable        nN equal count(Nitrogen)
variable        NumN2 equal    (v_nC+v_nN)/3


fix           nvtN2     N2    rigid/nvt/small molecule    temp ${temp} ${temp} ${Tdamp}  mol N2mol
fix_modify	nvtN2 dynamic/dof yes


fix     gcmcN2    N2    gcmc  ${GCMCNevery}    ${GCMCexchange}   ${GCMCmove}   0   ${seed}  &
${temp}    ${mu}    ${disp}  mol   N2mol   group    N2   rigid  nvtN2    tfac_insert  1       full_energy


compute_modify thermo_temp dynamic/dof yes


fix            121    all   ave/time     100     100    10000      c_TempN2       v_NumN2      mode scalar      file      Output-GCMC-before-equilibrium-T=${temp}-mu=${mu}.txt


variable	iacc equal f_gcmcN2[4]/(f_gcmcN2[3]+0.1)
variable	dacc equal f_gcmcN2[6]/(f_gcmcN2[5]+0.1)

thermo_style     custom    step     lx ly lz vol  pxx pyy pzz press  temp   c_TempN2   v_NumN2   v_iacc  v_dacc     pe   ke
thermo ${thermo}

restart         1000000 kerogen.restart1  kerogen.restart2


run   15000000


fix          GCMC5    all   ave/time    200     500    100000        c_TempN2       v_NumN2      file   Output-GCMC-after-equilibrium-${temp}-${mu}.txt

run   5000000

write_data           GCMC1-kerogen-${temp}-${mu}.data
