units real
atom_style full
boundary p p p

pair_style lj/class2/coul/long 14.0
pair_modify mix arithmetic tail yes
bond_style class2
angle_style class2
dihedral_style class2
improper_style class2
kspace_style pppm 1e-5

# Read data with extra allocations for GCMC molecules
read_data coal_relaxed.data &
extra/atom/types 3 &
extra/bond/types 1 &
extra/angle/types 1 &
extra/bond/per/atom 2 &
extra/angle/per/atom 1 &
extra/special/per/atom 2

# Define molecule templates with type offsets
# Assuming coal uses types 1-20, bonds 1-34, angles 1-72
molecule ch4_mol molecule_ch4.dat toff 20
molecule co2_mol molecule_co2.dat toff 20 boff 34 aoff 72

# Mass definitions (types 21, 22, 23 after offset)
mass 21 16.04     # CH4
mass 22 12.01     # C in CO2
mass 23 15.999    # O in CO2

# Pair coefficients
pair_coeff 21 21 0.294106 3.73
pair_coeff 22 22 0.053655 2.80
pair_coeff 23 23 0.156989 3.05
pair_coeff 21 22 0.125619 3.2650
pair_coeff 21 23 0.214875 3.3900
pair_coeff 22 23 0.091778 2.9250

# Bond and angle coefficients (types 35 and 73 after offset)
bond_coeff 35 1.16 1250.0 0.0 0.0
angle_coeff 73 180.0 160.0 0.0 0.0
angle_coeff 73 bb 0.0 1.16 1.16
angle_coeff 73 ba 0.0 0.0 1.16 1.16

# Groups
group coal type 1:20
group ch4 type 21
group co2 type 22:23

# Define atom-style variables
variable is_ch4 atom "type==21"
variable is_co2_C atom "type==22"     # CO2 carbon
variable is_co2_O atom "type==23"     # CO2 oxygen

# Create dynamic groups (use gases as parent, not "all")
group ch4_atoms dynamic ch4 var is_ch4
group co2_C_atoms dynamic co2 var is_co2_C
group co2_O_atoms dynamic co2 var is_co2_O

neighbor 3.0 bin
neigh_modify delay 0 every 1 check yes
timestep 1.0

variable temp equal 313.15
variable press equal 148.04
variable phi_ch4 equal 1.30891
variable phi_co2 equal 0.4333
variable Tdamp equal 100.0
variable Pdamp equal 1000.0

# Compute for CO2 temperature
compute TempCO2 co2 temp
compute_modify TempCO2 dynamic/dof yes

# Minimize energy
minimize 1.0e-4 1.0e-6 10000 100000

# --- STAGE 1: INITIAL EQUILIBRATION ---
fix nvt_coal coal nvt temp ${temp} ${temp} ${Tdamp}
run 10000

variable V0 equal vol
print "Initial system volume (V0): ${V0}"

unfix nvt_coal

# --- STAGE 2: GCMC/MD SIMULATION ---
print "Starting Hybrid GCMC/MD Simulation..."

# Rigid body dynamics for CO2 molecules
fix rigid_co2 co2 rigid/nvt/small molecule temp ${temp} ${temp} ${Tdamp} mol co2_mol
fix_modify rigid_co2 dynamic/dof yes

# NPT for entire system
fix npt_coal coal npt temp ${temp} ${temp} ${Tdamp} aniso ${press} ${press} ${Pdamp}

# GCMC for CH4 (no rigid constraint needed)
fix gcmc_ch4 ch4 gcmc 2000 500 0 0 54321 ${temp} 0.0 0.0 mol ch4_mol pressure ${press} fugacity_coeff ${phi_ch4} group ch4 tfac_insert 1.0 full_energy overlap_cutoff 1

# GCMC for CO2 (with rigid constraint)
fix gcmc_co2 co2 gcmc 2000 500 0 0 12345 ${temp} 0.0 0.0 mol co2_mol pressure ${press} fugacity_coeff ${phi_co2} group co2 rigid rigid_co2 tfac_insert 1.0 full_energy overlap_cutoff 1

# Modify thermo compute for dynamic DOF
compute_modify thermo_temp dynamic/dof yes

# ========== ISOSTERIC HEAT OF ADSORPTION SETUP ==========

# Compute potential energy for each gas species
compute pe_ch4 ch4 pe/atom
compute pe_co2 co2 pe/atom

# Sum total PE for each species
compute total_pe_ch4 ch4 reduce sum c_pe_ch4
compute total_pe_co2 co2 reduce sum c_pe_co2

# Variables for analysis
variable strain equal (vol - v_V0) / v_V0

variable nCH4_atoms equal count(ch4_atoms)
variable nCO2_C equal count(co2_C_atoms)
variable nCO2_O equal count(co2_O_atoms)


# Calculate number of molecules
variable n_ch4 equal v_nCH4_atoms        # CH4 is 1 atom per molecule
variable n_co2 equal (v_nCO2_C+v_nCO2_O)/3.0   # CO2 is 3 atoms per molecule

# Selectivity (with safety for division by zero)
variable n_ch4_safe equal "v_n_ch4 + 0.001"
variable selectivity equal v_n_co2/v_n_ch4_safe


# Variables for Qst calculation (fluctuation method)
variable U_ch4 equal c_total_pe_ch4
variable U_co2 equal c_total_pe_co2

# Reference the molecule counts (not redefining, just aliasing for clarity)
variable Nmol_ch4 equal v_n_ch4
variable Nmol_co2 equal v_n_co2

# Products needed for fluctuation formula
variable UN_ch4 equal v_U_ch4*v_Nmol_ch4
variable UN_co2 equal v_U_co2*v_Nmol_co2
variable N2_ch4 equal v_Nmol_ch4*v_Nmol_ch4
variable N2_co2 equal v_Nmol_co2*v_Nmol_co2

# GCMC acceptance ratios
variable iacc_ch4 equal f_gcmc_ch4[4]/(f_gcmc_ch4[3]+0.1)
variable dacc_ch4 equal f_gcmc_ch4[6]/(f_gcmc_ch4[5]+0.1)
variable iacc_co2 equal f_gcmc_co2[4]/(f_gcmc_co2[3]+0.1)
variable dacc_co2 equal f_gcmc_co2[6]/(f_gcmc_co2[5]+0.1)

thermo_style custom step temp press vol v_strain density atoms c_TempCO2 v_n_ch4 v_n_co2 v_iacc_ch4 v_dacc_ch4 v_iacc_co2 v_dacc_co2 pe ke
thermo 10000

dump 1 all custom 50000 dump.gcmc.lammpstrj id type x y z
dump visual_ch4 ch4 custom 5000 ch4_molecules.lammpstrj id type mol x y z
dump visual_co2 co2 custom 5000 co2_molecules.lammpstrj id type mol x y z

# Equilibration run
run 200000

# Production run with averaging
fix avg_out all ave/time 100 50 5000 v_n_ch4 v_n_co2 v_selectivity v_strain c_TempCO2 file adsorption_data.txt

# Average statistics for Qst calculation
fix avg_qst all ave/time 100 100 10000 &
    v_U_ch4 v_Nmol_ch4 v_UN_ch4 v_N2_ch4 &
    v_U_co2 v_Nmol_co2 v_UN_co2 v_N2_co2 &
    file qst_data.txt

run 1500000

write_restart final.restart
write_data final_adsorbed_structure.data
write_dump all xyz final_adsorbed_structure.xyz

print "GCMC/MD simulation finished."
print "Final CH4 molecules: ${n_ch4}"
print "Final CO2 molecules: ${n_co2}"
print "Final CO2/CH4 Selectivity: ${selectivity}"
print "Final Volumetric Strain: ${strain}"
