# Step 5: NPT cooling from 700K to 500K at 100 bar for 2 ns

units real
atom_style full
boundary p p p

pair_style lj/class2/coul/long 12.0
bond_style class2
angle_style class2
dihedral_style class2
improper_style class2
kspace_style pppm 1e-4
pair_modify mix sixthpower

read_data step04_final.data

neighbor 2.0 bin
neigh_modify delay 0 every 1 check yes

timestep 0.5

thermo_style custom step temp press vol density etotal ke pe
thermo 5000
thermo_modify flush yes

# ---------- Trajectory output ----------
dump traj all atom 10000 step05_trajectory.dump
dump_modify traj sort id

# Write restart files every 200,000 steps (~100 ps)
restart 50000 step01_restart_*.bin

fix npt5 all npt temp 700.0 500.0 100.0 aniso 98.6923 98.6923 1000.0 pchain 3

run 1000000  # 0.5 ns

unfix npt5
undump traj

write_data step05_final.data
